*Heading
 Refined four-hole plate with CPS3 left and CPS4 right, at least 10x source element count
** Job name: MixedPlateCps3Cps4_Perforated_10xJob Model name: MixedPlateCps3Cps4_Perforated_10x
** Generated by: Abaqus/CAE 2024
*Preprint, echo=NO, model=NO, history=NO, contact=NO
**
** PARTS
**
*Part, name=PART-PERFORATED
*Node
      1,         170.,          25.
      2,         200.,           0.
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*Element, type=CPS4
   1,  147,  148,  902,  888
   2,  148,  149,  903,  902
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*Element, type=CPS3
 4163, 5802,   75,   74
 4164, 6524, 4624, 6425
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*Nset, nset=SOLID, generate
    1,  8739,     1
*Elset, elset=SOLID, generate
     1,  12753,      1
*Elset, elset=LEFT_CPS3, generate
  4163,  12753,      1
*Elset, elset=RIGHT_CPS4, generate
    1,  4162,     1
** Section: Section-1-SOLID
*Solid Section, elset=SOLID, material=STEEL
,
*End Part
**
**
** ASSEMBLY
**
*Assembly, name=Assembly
**
*Instance, name=PART-1-1, part=PART-PERFORATED
*End Instance
**
*Nset, nset=FIXED, instance=PART-1-1
   7,   8, 421, 422, 423, 424
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*Elset, elset=RIGHT_EDGE_ELEMS, instance=PART-1-1
    1,    2,    3,    4,    5,    6
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*Elset, elset=_RIGHT_EDGE_S1, internal, instance=PART-1-1
    1,    2,    3,    4,    5,    6
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*Elset, elset=_RIGHT_EDGE_S2, internal, instance=PART-1-1
  201,  221,  241,  261,  281,  301
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*Surface, type=ELEMENT, name=RIGHT_EDGE
_RIGHT_EDGE_S1, S1
_RIGHT_EDGE_S2, S2
*End Assembly
**
** MATERIALS
**
*Material, name=STEEL
*Elastic
210000., 0.3
**
** BOUNDARY CONDITIONS
**
** Name: Disp-BC-1 Type: 位移/转角
*Boundary
FIXED, 1, 1
FIXED, 2, 2
** ----------------------------------------------------------------
**
** STEP: LOAD
**
*Step, name=LOAD, nlgeom=NO
*Static
1., 1., 1e-05, 1.
**
** LOADS
**
** Name: SURFFORCE-1   Type: Pressure
*Dsload
RIGHT_EDGE, P, -1.
**
** OUTPUT REQUESTS
**
*Restart, write, frequency=0
**
** FIELD OUTPUT: F-Output-1
**
*Output, field
*Node Output
RF, U
**
** FIELD OUTPUT: F-Output-2
**
*Element Output, directions=YES
S,
*Output, history, frequency=0
*End Step
