*Heading
** Biomimetic four-finger hand, full-integration C3D20
*Node
1, -48, -16, 0
2, -44, -16, 0
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*Element, type=C3D20, elset=ALL_C3D20
1, 1, 2, 3, 4, 5, 6, 7, 8, 9, 10,
11, 12, 13, 14, 15, 16, 17, 18, 19, 20
2, 2, 21, 22, 3, 6, 23, 24, 7, 25, 26,
27, 10, 28, 29, 30, 14, 18, 31, 32, 19
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*Nset, nset=WRIST_FIXED
51383, 51384, 51385, 51386, 51391, 51392
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*Nset, nset=FINGER_1_BASE
36729, 36730, 36732, 36736, 36738, 36740
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*Nset, nset=TIP_1
61717, 61718, 61719, 61720, 61721, 61722
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*Nset, nset=FINGER_2_BASE
36752, 36756, 36758, 36760, 36762, 36764
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*Nset, nset=TIP_2
64486, 64487, 64488, 64489, 64490, 64491
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*Nset, nset=FINGER_3_BASE
36784, 36788, 36790, 36792, 36794, 36796
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*Elset, elset=ALL_C3D20
1, 2, 3, 4, 5, 6
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*Elset, elset=FINGERS
12721, 12722, 12723, 12724, 12725, 12726
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*Elset, elset=FINGER_1
12721, 12722, 12723, 12724, 12725, 12726
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*Elset, elset=FINGER_2
13129, 13130, 13131, 13132, 13133, 13134
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*Elset, elset=FINGER_3
13597, 13598, 13599, 13600, 13601, 13602
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*Elset, elset=FINGER_4
14101, 14102, 14103, 14104, 14105, 14106
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*Elset, elset=FINGERTIP_LOAD_FACE_ELEMENTS
13117, 13118, 13119, 13120, 13121, 13122
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*Surface, type=ELEMENT, name=FINGERTIP_LOAD_FACE
FINGERTIP_LOAD_FACE_ELEMENTS, S2
*Material, name=ALUMINUM_7075
*Density
2.81e-9
*Elastic
70000., 0.33
*Solid Section, elset=ALL_C3D20, material=ALUMINUM_7075
,
*Step, name=GripLoad
*Static
1., 1., 1e-05, 1.
*Boundary
WRIST_FIXED, ENCASTRE
*Dsload
FINGERTIP_LOAD_FACE, TRVEC, 0.109265734266, 0., -1., 0.
** Gravity: 9.81 m/s^2 = 9810 mm/s^2 in the global -Z direction.
*Dload
ALL_C3D20, GRAV, 9810., 0., 0., -1.
*Output, field
*Node Output
RF, U
*Element Output
S
*End Step
