*Heading
Phase 2 independent one-element Abaqus B31 distributed-load oracle
*Node
1, 0.0, 0.0, 0.0
2, 2.0, 0.0, 0.0
*Element, type=B31, elset=BEAM
1, 1, 2
*Nset, nset=FIXED
1
*Material, name=STEEL
*Elastic
210000000000.0, 0.3
*Beam Section, elset=BEAM, material=STEEL, section=RECT
0.2, 0.1
0.0, 1.0, 0.0
*Boundary
FIXED, ENCASTRE
*Step, name=LOCAL_P1
*Static
*Dload, op=NEW
BEAM, P1, 500.0
*Output, field
*Node Output
U, RF
*End Step
*Step, name=LOCAL_P2
*Static
*Dload, op=NEW
BEAM, P2, -300.0
*Output, field
*Node Output
U, RF
*End Step
