*Heading
** Job name: Cantilever_Beam Model name: Model-1
** Generated by: Abaqus/CAE 2023
*Preprint, echo=NO, model=NO, history=NO, contact=NO
**
** PARTS
**
*Part, name=Cantilever_Beam
*Node
      1,          10.,          10.,         100.
      2,          10.,           5.,         100.
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*Element, type=C3D20
 1,  64,  65,  68,  67,   1,   2,   5,   4, 193, 192, 191, 190, 194, 195, 196,
    197, 199, 198, 200, 201
 2,  65,  66,  69,  68,   2,   3,   6,   5, 204, 203, 202, 192, 205, 206, 207,
    195, 198, 208, 209, 200
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*Nset, nset=Set-Steel, generate
   1,  621,    1
*Elset, elset=Set-Steel, generate
  1,  80,   1
** Section: Section
*Solid Section, elset=Set-Steel, material=Steel
,
*End Part
**
**
** ASSEMBLY
**
*Assembly, name=Assembly
**
*Instance, name=Cantilever_Beam-1, part=Cantilever_Beam
*End Instance
**
*Nset, nset=Set-Fixed, instance=Cantilever_Beam-1
   1,   2,   3,  64,  65,  66
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*Elset, elset=Set-Fixed, instance=Cantilever_Beam-1
  1,  2, 41, 42
*Elset, elset=_Surf-1_S5, internal, instance=Cantilever_Beam-1
 39, 40, 79, 80
*Surface, type=ELEMENT, name=Surf-Traction
_Surf-1_S5, S5
*End Assembly
**
** MATERIALS
**
*Material, name=Steel
*Density
 7.85e-09,
*Elastic
206000., 0.3
** ----------------------------------------------------------------
**
** STEP: Step-1
**
*Step, name=Step-1, nlgeom=NO
*Static
1., 1., 1e-05, 1.
**
** BOUNDARY CONDITIONS
**
** Name: BC-1 Type: Displacement/Rotation
*Boundary
Set-Fixed, ENCASTRE
**
** LOADS
**
** Name: Load-1   Type: Surface traction
*Dsload
Surf-Traction, TRSHR, 10., 0., -1., 0.
** Name: Load-Gravity   Type: Gravity
*Dload
, GRAV, 9810., 0., -1., 0.
**
** OUTPUT REQUESTS
**
*Restart, write, frequency=0
**
** FIELD OUTPUT: F-Output-1
**
*Output, field, variable=PRESELECT
**
** HISTORY OUTPUT: H-Output-1
**
*Output, history, variable=PRESELECT
*End Step
