** Case 6B: section boundary, same material but different solid section assignments
** Full-node displacement boundary benchmark
** FLAT input: no *Part/*Assembly/*Instance, so boundary node labels are plain integers.
*Heading
Case 6B: section boundary, same material but different solid section assignments
** Same material, but separate Solid Section assignments / elsets. Use project-side section key to prevent cross-section averaging.
*Preprint, echo=NO, model=NO, history=NO, contact=NO
*Node
1, 0, 0, 0
2, 0, 1, 0
3, 0, 0, 1
4, 0, 1, 1
5, 1, 0, 0
6, 1, 1, 0
7, 1, 0, 1
8, 1, 1, 1
9, 2, 0, 0
10, 2, 1, 0
11, 2, 0, 1
12, 2, 1, 1
*Element, type=C3D8, elset=SECTION_LEFT
1, 1, 5, 6, 2, 3, 7, 8, 4
*Element, type=C3D8, elset=SECTION_RIGHT
2, 5, 9, 10, 6, 7, 11, 12, 8
*Material, name=MAT_A
*Elastic
210000, 0.3
*Solid Section, elset=SECTION_LEFT, material=MAT_A
,
*Solid Section, elset=SECTION_RIGHT, material=MAT_A
,
*Nset, nset=ALLNODES
1, 2, 3, 4, 5, 6, 7, 8, 9, 10, 11, 12
*Step, name=Step-1, nlgeom=NO
*Static
1., 1., 1e-05, 1.
*Boundary, OP=NEW
1, 1, 1, 0
1, 2, 2, 0
1, 3, 3, 0
2, 1, 1, 0
2, 2, 2, 0.0005
2, 3, 3, 0
3, 1, 1, 0
3, 2, 2, 0
3, 3, 3, 0.0003
4, 1, 1, 0
4, 2, 2, 0.0013
4, 3, 3, 0.0003
5, 1, 1, 0.001
5, 2, 2, 0
5, 3, 3, 0
6, 1, 1, 0.002
6, 2, 2, 0.0005
6, 3, 3, 0
7, 1, 1, 0.001
7, 2, 2, 0
7, 3, 3, 0.0009
8, 1, 1, 0.002
8, 2, 2, 0.0013
8, 3, 3, 0.0009
9, 1, 1, 0.002
9, 2, 2, 0
9, 3, 3, 0
10, 1, 1, 0.004
10, 2, 2, 0.0005
10, 3, 3, 0
11, 1, 1, 0.002
11, 2, 2, 0
11, 3, 3, 0.0015
12, 1, 1, 0.004
12, 2, 2, 0.0013
12, 3, 3, 0.0015
** Abaqus normally stores S at integration points in the ODB.
** For comparison, extrapolate in odbAccess/CAE to ELEMENT_NODAL, then average by your own region/cluster rules.
*Output, field, frequency=1
*Node Output
U, RF
*Element Output, directions=YES
S, E
*End Step
