*Heading
** Abaqus-correct connected arched steel canopy / factory-frame case generated through Abaqus MCP.
** Units: m, N, Pa. All members are B31 beam elements sharing physical joint nodes.
** Boundary condition: only the column bases are fixed. Snow load acts downward on roof ribs and purlins.
*Preprint, echo=NO, model=NO, history=NO, contact=NO
*Node
1, 0.000000, 0.000000, 6.000000
2, 3.000000, 0.000000, 7.530734
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*Element, type=B31, elset=ALL_BEAMS_SOURCE
1, 82, 84
2, 84, 1
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*Elset, Elset=COLUMNS
1, 2, 3, 4, 5, 6
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*Elset, Elset=ARCH_RIBS
37, 38, 39, 40, 41, 42
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*Elset, Elset=PURLINS
109, 110, 111, 112, 113, 114
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*Elset, Elset=SIDE_RAILS
181, 182, 183, 184, 185, 186
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*Elset, Elset=ROOF_BRACING
213, 214, 215, 216, 217, 218
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*Elset, Elset=ROOF_SNOW
37, 38, 39, 40, 41, 42
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*Elset, Elset=ALL_BEAMS
1, 2, 3, 4, 5, 6
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*Nset, Nset=BASE_SUPPORTS
82, 86, 90, 94, 98, 102
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*Nset, Nset=RIDGE_NODES
5, 14, 23, 32, 41, 50, 59, 68, 77
*Nset, Nset=EAVE_NODES
1, 10, 19, 28, 37, 46
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*Material, name=STEEL
*Density
7850.0
*Elastic
2.10E11, 0.30
*Beam Section, elset=COLUMNS, material=STEEL, section=RECT
0.45, 0.30
1.0, 0.0, 0.0
*Beam Section, elset=ARCH_RIBS, material=STEEL, section=RECT
0.38, 0.22
*Beam Section, elset=PURLINS, material=STEEL, section=RECT
0.18, 0.10
0.0, 0.0, 1.0
*Beam Section, elset=SIDE_RAILS, material=STEEL, section=RECT
0.16, 0.10
0.0, 0.0, 1.0
*Beam Section, elset=ROOF_BRACING, material=STEEL, section=RECT
0.08, 0.08
0.0, 0.0, 1.0
*Boundary
BASE_SUPPORTS, ENCASTRE
*Step, name=SnowLoad, nlgeom=NO
*Static
1.0, 1.0, 1.0E-05, 1.0
*Dload
ROOF_SNOW, PZ, -1800.0
*Output, field, variable=PRESELECT
*Node Output
U, RF
*Element Output, directions=YES
S, E
*End Step
