*Heading
** Retired FEM-Python wire dialect: Beam geometry belongs in data records.
*Node
1, 0.0, 0.0, 0.0
2, 1.0, 0.0, 0.0
*Element, type=B31, elset=BEAM
1, 1, 2
*Material, name=STEEL
*Elastic
2.10E11, 0.30
*Beam Section, elset=BEAM, material=STEEL, section=RECTANGLE, height=0.20, width=0.10
